// COMSOL Multiphysics 6.3.0.290 model "硫化物垂直渗透模型(橄榄石粒径+初始硫化物分布1m).mph"
// Outline of the model tree

Functions
  step1: Step "阶跃 1" | location = 500; smooth = 1000

Variables
  var1 "变量 1"
    r_olivine1 = 0.5*((1/(10*dl.epsilon))^0.5)*1E-3[m]
    d_olivine = 2*r_olivine
    r_throat = (-0.5454*(1-dl.epsilon)+0.5976)*r_olivine
    r_pore = (-0.4089*(1-dl.epsilon)+0.577)*r_olivine
    r_olivine = 0.75E-3[m]

Geometry
  geom1 "几何 1" (2D, length unit m)
    r1: Rectangle "矩形 1" | size = {5, 6}
    pt1: Point "点 1" | p = {2, 6}
    pt2: Point "点 2" | p = {3, 6}
    pt3: Point "点 3" (disabled) | p = {2.5, 0}
    pt4: Point "点 4" (disabled) | p = {7.5, }
    fin: Finalize "形成联合体"

Physics
  phtr: PhaseTransportPorousMedia "多孔介质相传递" on all domains
    dependent variable s1 = {s1, s2}
    GravityEffects.IncludeGravity = 1
    porous1: PorousMedium "相和多孔介质传递属性" (default)
      fluid1: FluidPorousMedium "Fluid 1" (default)
        pc = {0, 0.21[N/m]*(1/r_pore+1/r_throat)}
        rhoint_s1_mat = userdef
        rhoint_s1 = 2650[kg/m^3]
        mu_s1_mat = userdef
        mu_s1 = 20[Pa*s]
        rhoint_s2_mat = userdef
        rhoint_s2 = 4500[kg/m^3]
        mu_s2_mat = userdef
        mu_s2 = 0.05[Pa*s]
      pm1: PorousMatrix (default) | matlistporo = dommat
    pptp1: PhaseAndPorousMediaTransportProperties "相和多孔介质传递属性 1" (disabled) on all domains
      pc = {0, 0.21[N/m]*(1/r_pore+1/r_throat)}
      rhoint_s1_mat = userdef
      rhoint_s1 = 2650[kg/m^3]
      mu_s1_mat = userdef
      mu_s1 = 20[Pa*s]
      rhoint_s2_mat = userdef
      rhoint_s2 = 4500[kg/m^3]
      mu_s2_mat = userdef
      mu_s2 = 0.05[Pa*s]
    init1: InitialValues "初始值 1" (default)
    nf1: NoFlux "无通量 1" (default)
    gr1: Gravity "重力 1"
    mf1: MassFlux "质量通量 1" on boundaries 4 | phases = {0, 1}; q0 = {0, 1E-5*4500*step1(t[1/s])}
    sa1: VolumeFraction "体积分数 1" on boundaries 1-3, 5, 6 | phases = {0, 1}
    of1: Outflow "流出 1" on boundaries 2
  dl: PorousMediaFlowDarcy "达西定律" on all domains
    dependent variable p
    porous1: PorousMedium "多孔介质 1" (default)
      fluid1: FluidPorousMedium "流体 1" (default)
        fluid = dommat
        fluidType = compressible
        gasConstantType = specificGC
        Constitutiverelation = newtonian
        nonNewtonianModels = powerLaw
        gamma_ref = 1[1/s]
        gamma_lowlimit = 0.01[1/s]
        alpha = 1
        C = 4
        Twlf = 293.15[K]
        C1wlf = 8.86
        C2wlf = 51.6[K]
        T0 = 293.15[K]
        alphaT = 1
        shift_temperature = dl.Tref
      pm1: PorousMatrixPorousMedium "多孔基体 1" (default)
        epsilon_mat = userdef
        epsilon = 0.4
        kappa_mat = userdef
        kappa = dl.epsilon^3*(2*r_olivine)^2/300
    nf1: NoFlow "无流动 1" (default)
    init1: init "初始值 1" (default)
    inl1: Inlet "入口 1" on boundaries 4
      BoundaryCondition = MassFlow
      MassFlowType = PointWiseMassFlux
      N0 = 1E-5*4500*step1(t[1/s])
    pr1: Pressure "压力 1" on boundaries 2 | p0 = (6-y)*2700[kg/m^3]*9.81[m/s^2]
    mf1: MassFlux "质量通量 1" on boundaries 1-3, 5, 6
    out1: Outlet "出口 1" (disabled) on boundaries 2 | U0out = 1E-5

Multiphysics
  mfpm1: MultiphaseFlowInPorousMedia "多孔介质多相流 1" on all domains | multiphaseflow_physics = phtr; darcyc_physics = dl

Mesh
  mesh1 "网格 1"
    size: MeshSizeDefault "大小" | hmax = 0.2; hmin = 0.002; custom = on
    size1: Size "大小 1" on boundaries 3-5 | hmax = 0.075; hmin = 0.005; hgrad = 1.2; custom = on
    ftri1: FreeTri "自由三角形网格 1" on remaining entities | smoothmaxiter = 4; smoothmaxdepth = 4

Studies
  std1 "研究 1: Porosity = 0.4, r = 0.5mm, v = 1E-5"
    time: Transient "瞬态" | tlist = range(0,10000,1000000)

Solver configurations
  sol1 "解 1" (study std1)
    v1: Variables "因变量 1"
      comp1_s2: Field "体积分数 (comp1.s2)" | scalemethod = manual; scaleval = 1
    t1: Time "瞬态求解器 1" | tlist = range(0,10000,1000000); rtol = 0.005; maxorder = 2; stabcntrl = on
      fc1: FullyCoupled "全耦合 1"
        linsolver = d1
        maxiter = 10
        jtech = onevery
        stabacc = aacc
        aaccdim = 5
        aaccmix = 0.9
        aaccdelay = 1
        damp = 0.8
      d1: Direct "直接，多孔介质多相流 (mfpm1) (已合并)" | linsolver = pardiso; pivotperturb = 1.0E-13

Datasets
  dset1: Solution | solution = sol1
  step1_ds1: Grid1D "一维栅格 1"
  dset7: Solution | solution = none

Tables
  tbl1: Table "表格 1"
    // 表面积分 1
    Time (s) | if(s2>0.05,1,0) (m^2)
    1e+06 | 30.5837

Plots
  pg2: PlotGroup2D "压力 (dl)" | data = dset1
    surf1: Surface "表面" | expr = dl.U; descr = 总达西速度大小
    str1: Streamline "流线 1" on boundaries 1-6 | expr = {dl.u, dl.v}; pointtype = arrow; arrowlength = logarithmic
  pg3: PlotGroup1D "一维绘图组 3" | data = step1_ds1
    plot1: Function "函数 1" | expr = step1(x)